*Heading
Cavity inflation in the presence of surface tension
**
** This input file is for the simulation of the growth of a spherical
**    or cylindrical cavity under internal pressure in a nearly-infinite
**    Neo-Hookean elastomeric matrix in the presence of surface tension
**    on the hole face. It is to be used with the UEL subroutine,
**    uel_surften_2D.for.
**
** UNITS:  Length - microns, Time - sec, Angle - radians,
**	   Force - microNewtons, Mass - kilograms,
**	   Stress - microNewton/micron^2 = MPa,
**	   Surface Tension = microNewtons/micron
**
** REDUCED INTEGRATION: In order to use reduced integration four
**     changes should be made:
**
**     1. In the '*User element' command, Variables should be changed
**        from 36 to 9.
**     2. The element type of the dummy mesh should be changed
**        from CAX4 to CAX4R.
**     3. In the Material Definition section of this input file,
**        the '*Hourglass Stiffness' command and subsequent line
**        should be uncommented.
**     4. In the UEL subroutine, nInt should be set to 1.
**
** DISPLACEMENT STEP RESTRICTION: To specify the maximum allowable
**     displacement increment in terms of a fraction of the element
**     size, set the parameter maxDisp in the UEL subroutine.  For
**     the cavitation simulations, maxDisp=0.20 was used.
**
** David L. Henann, July 2013
**
************************************************************************
**			PARAMETERS
************************************************************************
**
*Parameter
**
** Material properties
** Shear modulus (MPa)
G0 = 0.001
**
** Bulk modulus (MPa)
Kbulk = 1.0
**
** Max normalized surface tension
gamma_norm = 4.0
**
** Surface tension (N/m)
gamma = gamma_norm*G0*1.0
**
** Ramp time (s)
tf = 1.0
**
** Axisymmetric/Plane strain flag
**   pe = 0 Axi, pe = 1 PE
pe = 0
**
************************************************************************
**			MODEL DEFINITION
************************************************************************
**
** Nodes
**
*Node, nset=nAll
      1,           1.,           0.
      2,   1.07109797,           0.
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**
** Elements
**
*User Element,Nodes=4,Type=U1,Iproperties=2,Properties=5,Coordinates=2,Variables=36,Unsymm
1,2
**
*Element, type=U1, elset=elAll
   1,    1,    2,   83,   82
   2,    2,    3,   84,   83
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**
** Make the dummy mesh, shares nodes with the real mesh,
**  allows visualization of the results, access to
**  hourglass controls, and access to mechanical,
**  traction-type boundary conditions
**
*Element, type=CAX4, elset=ElDummy
10001,1,2,83,82
10002,2,3,84,83
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**
** Sets
**
*Elset, elset=Inner, generate
    1,  3921,    80
*Node, nset=InnerRefPt
 999998,           1.,           0.,           0.
*Node, nset=OuterRefPt
 999999,          50.,           0.,           0.
*Nset, nset=Inner, generate
    1,  4051,    81
*Nset, nset=Outer, generate
   81,  4131,    81
*Nset, nset=thetaSymm
    1,    2,    3,    4,    5,    6
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*Nset, nset=Transformed
thetaSymm,
Inner,
InnerRefPt,
Outer,
OuterRefPt,
*Transform, nset=Transformed, type=C
          0.,           0.,           0.,           0.,           0.,           1.
************************************************************************
**			MATERIAL DEFINITION
************************************************************************
**
** Material properties for the real material
**
*uel property,elset=elall
*******************************************************************
**G0	Kbulk	Im	Gnoneq	eta	pe	matflag
<G0>,	<Kbulk>, 0.0,	0.0,	1.0,	<pe>,	1
**
*******************************************************************
**
** Dummy mesh material properties
**
*Solid section, elset=ElDummy, material=Material-1
***Hourglass stiffness
**250.0
**
*Material, name=Material-1
** The dummy mesh stiffness is very small
*Elastic
1.e-20
************************************************************************
**			   AMPLITUDE
************************************************************************
*Amplitude, name=amp-1
0.0,0.0,<tf>,1.0
************************************************************************
**			  CONSTRAINTS
************************************************************************
*Equation
2
Inner, 1, 1.
InnerRefPt, 1, -1.
*Equation
2
Outer, 1, 1.
OuterRefPt, 1, -1.
************************************************************************
**			BOUNDARY CONDITIONS
************************************************************************
*Boundary
thetaSymm,2,2
************************************************************************
**			STEP DEFINITION
************************************************************************
*Step, Name=ST, nlgeom=yes, unsymm=yes, inc=50000
*Static
0.01,<tf>,1.e-8,0.01
*CONTROLS, PARAMETERS=LINE SEARCH
10,1.0,0.0001,0.25,0.10
*CONTROLS, PARAMETERS=TIME INCREMENTATION
,,,,,,,10,,,,,,
**
*Dload, amplitude = amp-1
Inner,U4,<gamma>
**
*Output, field, number interval=20
*node output, nset=nall
u
*Element output, elset=ElDummy
le
**
*Output, history, time interval = 0.02
*node output, nset=InnerRefPt
u1,rf1
*node output, nset=OuterRefPt
u1,rf1
**
*End Step
************************************************************************
*Step, Name=Deform, nlgeom=yes, unsymm=yes, inc=50000
*Static
0.01,<tf>,1.e-8,0.01
*CONTROLS, PARAMETERS=LINE SEARCH
10,1.0,0.0001,0.25,0.10
*CONTROLS, PARAMETERS=TIME INCREMENTATION
,,,,,,,10,,,,,,
**
*Dload
Inner,U4,<gamma>
*Boundary, type=velocity
InnerRefPt,1,1,5.0
**
*Output, field, number interval=20
*node output, nset=nall
u
*Element output, elset=ElDummy
le
**
*Output, history, time interval = 0.02
*node output, nset=InnerRefPt
u1,rf1
*node output, nset=OuterRefPt
u1,rf1
**
*End Step
************************************************************************
